# OpenSim document version 30000
Model exoskeleton:
  length_units: meters
  force_units: N
  gravity: 0 -9.8065 0
  credits:
    Delp S.L., Loan J.P., Hoy M.G., Zajac F.E., Topp E.L., Rosen J.M., Thelen D.G., Anderson F.C., Seth A., Reinbolt J.A. Notes: 2D, 6 DOF leg model adpated by Jeff Reinbolt and Ajay Seth based on gait2354.osim Frank C. Anderson, and Scott L. Delp, Stanford University. Lower extremity joint defintions based on Delp et al. (1990). Low back joint and anthropometry based on Anderson and Pandy (1999, 2001). Planar knee model of Yamaguchi and Zajac (1989). Seth replaced tibia translation constraints with a CustomJoint for the knee and removed the patella to eliminate all kinematic constraints; insertions of the quadrucepts are handled with moving points in the tibia frame as defined by Delp 1990. Number of muscles were reduced by Reinbolt and Anderson to improve simulation speed for demonstrations and is not intended to be used in research. License: Creative Commons (CCBY 3.0). You are free to distribute, remix, tweak, and build upon this work, even commercially, as long as you credit us for the original creation. http://creativecommons.org/licenses/by/3.0/
  publications:
    Delp, S.L., Loan, J.P., Hoy, M.G., Zajac, F.E., Topp E.L., Rosen, J.M.: An interactive graphics-based model of the lower extremity to study orthopaedic surgical procedures, IEEE Transactions on Biomedical Engineering, vol. 37, pp. 757-767, 1990. Yamaguchi G.T., Zajac F.E.: A planar model of the knee joint to characterize the knee extensor mechanism." J . Biomecl7. vol. 21. pp. 1-10. 1989. Anderson F.C., Pandy M.G.: A dynamic optimization solution for vertical jumping in three dimensions. Computer Methods in Biomechanics and Biomedical Engineering 2:201-231, 1999. Anderson F.C., Pandy M.G.: Dynamic optimization of human walking. Journal of Biomechanical Engineering 123:381-390, 2001.
  BodySet:
    Body ground: mass=0 mass_center=(0 0 0) inertia_xx=0 inertia_yy=0 inertia_zz=0
    Body pelvis: mass=10.75379 mass_center=(-0.0739512 0 0) inertia_xx=0.1027003 inertia_yy=0.08701554
        inertia_zz=0.05784385 meshes=(sacrum.vtp pelvis.vtp l_pelvis.vtp)
      PinJoint pelvisGround: parent_body=ground location_in_parent=(0 0 0) location=(0 0 0)
        Coordinate pelvisGround_coord_0: motion_type=rotational
    Body femur_r: mass=8.549266 mass_center=(0 -0.199543 0) inertia_xx=0.1695643 inertia_yy=0.0444489
        inertia_zz=0.1788087 meshes=femur_r.vtp
      CustomJoint hip_r: parent_body=pelvis location_in_parent=(-0.0739512 -0.0691397 0.0873398) location=(0 0 0)
        Coordinate hip_flexion_r: motion_type=rotational default_value=-0.1753992 range=(-2.094395 2.094395)
            clamped=true
        SpatialTransform: axes_held_at_zero=(translation1 translation2 translation3)
          TransformAxis rotation1: coordinates=hip_flexion_r axis=(0 0 1) LinearFunction(coefficients=1 0)
          TransformAxis rotation2: axis=(1 0 0) Constant(value=-0.01555646)
          TransformAxis rotation3: axis=(0 1 0) Constant(value=-0.07460014)
    Body tibia_r: mass=4.674042 mass_center=(0 -0.2098 0) inertia_xx=0.08023514 inertia_yy=0.00811903
        inertia_zz=0.08134951 meshes=(tibia_r.vtp fibula_r.vtp)
      CustomJoint knee_r: parent_body=femur_r location_in_parent=(0 0 0) location=(0 0 0)
        Coordinate knee_angle_r: motion_type=rotational default_value=-0.6469763 range=(-2.094395 0.1745329)
            clamped=true
        SpatialTransform: axes_held_at_zero=(rotation2 rotation3 translation3)
          TransformAxis rotation1: coordinates=knee_angle_r axis=(0 0 1) LinearFunction(coefficients=1 0)
          TransformAxis translation1: coordinates=knee_angle_r axis=(1 0 0)
            MultiplierFunction: scale=1
              SimmSpline: x=(-2.0944 -1.74533 -1.39626 -1.0472 -0.698132 -0.349066 -0.174533 0.197344 0.337395 0.490178 1.52146 2.0944)
                  y=(-0.0037561 0.00210107 0.00482424 0.00481249 0.00248841 -0.00117378 -0.00363871 -0.00613534 -0.00637949 -0.00654265 -0.00637949 -0.00616234)
          TransformAxis translation2: coordinates=knee_angle_r axis=(0 1 0)
            MultiplierFunction: scale=1
              SimmSpline: x=(-2.0944 -1.22173 -0.523599 -0.349066 -0.174533 0.159149 2.0944)
                  y=(-0.496039 -0.479137 -0.468338 -0.466695 -0.465521 -0.463953 -0.464817)
    Body patella_r: mass=0.09191376 mass_center=(0 0 0) inertia_xx=0.00110296 inertia_yy=0.00110296
        inertia_zz=0.00110296 meshes=pat.vtp
      CustomJoint tib_pat_r: parent_body=tibia_r location_in_parent=(0 0 0) location=(0 0 0)
        Coordinate knee_angle_pat_r: motion_type=rotational default_value=-0.6469763 range=(-2.094 10) clamped=false
        SpatialTransform: axes_held_at_zero=(rotation2 rotation3 translation3)
          TransformAxis rotation1: coordinates=knee_angle_pat_r axis=(0 0 1)
            SimmSpline: x=(-2.0944 -1.99997 -1.45752 -0.526391 0.0279253 0.174533)
                y=(0.308051 0.308051 0.306305 0.270177 -0.037001 -0.279951)
          TransformAxis translation1: coordinates=knee_angle_pat_r axis=(1 0 0)
            MultiplierFunction: scale=1
              SimmSpline: x=(-2.0944 -1.39626 -1.0472 -0.698132 -0.349066 -0.174533 0 0.00017453 0.00034907 0.0872665 2.0944)
                  y=(0.0194405 0.0364088 0.042814 0.0483203 0.0527029 0.0543884 0.0557369 0.0557369 0.0557369 0.0557369 0.0557369)
          TransformAxis translation2: coordinates=knee_angle_pat_r axis=(0 1 0)
            MultiplierFunction: scale=1
              SimmSpline: x=(-2.0944 -1.5708 -1.39626 -1.0472 -0.698132 -0.349066 -0.174533 0 0.00017453 0.00034907 0.0872665 2.0944)
                  y=(-0.0246096 -0.0226993 -0.0224746 -0.0229241 -0.0237107 -0.0246096 -0.0250591 -0.0255086 -0.0255086 -0.0255086 -0.0255086 -0.0255086)
    Body talus_r: mass=0.1260686 mass_center=(0 0 0) inertia_xx=0.00202166 inertia_yy=0.00202166 inertia_zz=0.00202166
        meshes=talus.vtp
      CustomJoint ankle_r: parent_body=tibia_r location_in_parent=(0 -0.483203 0) location=(0 0 0)
        Coordinate ankle_angle_r: motion_type=rotational default_value=0.09735134 range=(-1.571 1.571) clamped=false
        SpatialTransform: axes_held_at_zero=(rotation2 rotation3 translation1 translation2 translation3)
          TransformAxis rotation1: coordinates=ankle_angle_r axis=(-0.105 -0.174 0.979)
              LinearFunction(coefficients=1 0)
    Body calcn_r: mass=1.072248 mass_center=(0.102693 0.0308079 0) inertia_xx=0.00090462 inertia_yy=0.00361848
        inertia_zz=0.00361848 meshes=foot.vtp
      WeldJoint subtalar_r: parent_body=talus_r location_in_parent=(-0.0620508 -0.0531864 0.0101307) location=(0 0 0)
    Body toes_r: mass=0.1861423 mass_center=(0.0359425 0.00616157 -0.0184847) inertia_xx=0 inertia_yy=0
        inertia_zz=0.00090462 meshes=bofoot.vtp
      WeldJoint mtp_r: parent_body=calcn_r location_in_parent=(0.18382 -0.00205386 0.00102692) location=(0 0 0)
    Body rFoot: mass=0.510668 mass_center=(0.0772387 -1.03254 0.105156) inertia_xx=0.5509664 inertia_yy=0.01316655
        inertia_zz=0.5509664 inertia_xy=-0.04122131 inertia_xz=0.003865444 inertia_yz=-0.05531096 meshes=rfoot.obj
      FreeJoint ankJoint_r: parent_body=toes_r location_in_parent=(-0.15 0.07 0.1) location=(0 0 0)
        Coordinate ankJoint_r_xRotation: motion_type=rotational
        Coordinate ankJoint_r_yRotation: motion_type=rotational
        Coordinate ankJoint_r_zRotation: motion_type=rotational
        Coordinate ankJoint_r_xTranslation: motion_type=translational
        Coordinate ankJoint_r_yTranslation: motion_type=translational
        Coordinate ankJoint_r_zTranslation: motion_type=translational
    Body rKnee: mass=0.1956725 mass_center=(0.0335732 -0.703072 0.150985) inertia_xx=0.1058946 inertia_yy=0.004949445
        inertia_zz=0.1058946 inertia_xy=0.003664639 inertia_xz=0.0009008935 inertia_yz=-0.02112655 meshes=RightKnee.obj
      PinJoint ortAnkle_r: parent_body=rFoot location_in_parent=(0 0 0) location=(0 0 0)
        Coordinate ortAnkle_r_coordinate: motion_type=rotational range=(-1.74533 1.74533)
    Body rHip: mass=0.2138295 mass_center=(0.111855 -0.233082 0.153284) inertia_xx=0.02384504 inertia_yy=0.008445379
        inertia_zz=0.02384504 inertia_xy=-0.005315422 inertia_xz=0.0036718 inertia_yz=-0.008210547 meshes=RightHip.obj
      PinJoint ortHip_r: parent_body=rKnee location_in_parent=(0.0725 0.445 0) location=(0 0 0)
        Coordinate ortHip_r_coordinate: motion_type=rotational default_value=0.6608507 range=(-1.74533 1.74533)
            locked=true
  ConstraintSet:
    CoordinateCouplerConstraint pat_angle_r: independent_coordinate_names=knee_angle_r
        dependent_coordinate_name=knee_angle_pat_r scale_factor=1
        coupled_coordinates_function=LinearFunction(coefficients=1 0)
    WeldConstraint: body_1=ground body_2=pelvis location_body_1=(0 0 0) orientation_body_1=(0 0 0)
        location_body_2=(0 0 0) orientation_body_2=(0 0 0)
  ForceSet:
    Thelen2003Muscle [values shared by the 9 below unless stated]: isDisabled=true min_control=0.01 max_control=1
        optimal_force=1 max_contraction_velocity=10 activation_time_constant=0.01 deactivation_time_constant=0.04
        FmaxTendonStrain=0.033 FmaxMuscleStrain=0.6 KshapeActive=0.5 KshapePassive=4 Af=0.3 Flen=1.8
    Thelen2003Muscle bifemlh_r: max_isometric_force=2594 optimal_fiber_length=0.1282385 tendon_slack_length=0.383539
        pennation_angle_at_optimal=0 [radians]
      PathPoint P1: pelvis (-0.131752 -0.107287 0.0726333)
      PathPoint P2: tibia_r (-0.0338242 -0.0404542 0.0330713)
      PathPoint P3: tibia_r (-0.0262952 -0.0632659 0.0385439)
    Thelen2003Muscle bifemsh_r: max_isometric_force=960 optimal_fiber_length=0.2008373 tendon_slack_length=0.1033209
        pennation_angle_at_optimal=0.4014257
      PathPoint P1: femur_r (0.0058689 -0.247785 0.0274665)
      PathPoint P2: tibia_r (-0.0338242 -0.0404542 0.0330713)
      PathPoint P3: tibia_r (-0.0262952 -0.0632659 0.0385439)
    Thelen2003Muscle glut_max2_r: max_isometric_force=1944 optimal_fiber_length=0.1629139 tendon_slack_length=0.1407488
        pennation_angle_at_optimal=0
      PathPoint P1: pelvis (-0.141103 0.0184094 0.058889)
      PathPoint P2: pelvis (-0.143928 -0.0543913 0.0956031)
      PathPoint P3: femur_r (-0.050003 -0.0622103 0.0343917)
      PathPoint P4: femur_r (-0.018311 -0.119256 0.0491814)
    Thelen2003Muscle psoas_r: max_isometric_force=2342 optimal_fiber_length=0.1074282 tendon_slack_length=0.1718851
        pennation_angle_at_optimal=0.1396263
      PathPoint P1: pelvis (-0.0676753 0.0927789 0.030229)
      PathPoint P2: pelvis (-0.0248945 -0.0596212 0.0793903)
      ConditionalPathPoint P3: pelvis (-0.0301244 -0.0842019 0.0853524) range=(-1.5708 0.785398)
          coordinate=hip_flexion_r
      PathPoint P4: femur_r (0.00187804 -0.0595106 0.00446036)
      PathPoint P5: femur_r (-0.0220671 -0.0700747 0.0122073)
    Thelen2003Muscle rect_fem_r: max_isometric_force=1169 optimal_fiber_length=0.1328739 tendon_slack_length=0.3613238
        pennation_angle_at_optimal=0.08726646
      PathPoint P1: pelvis (-0.0308566 -0.0325302 0.101251)
      ConditionalPathPoint P2: femur_r (0.0392043 -0.473033 0.00223019) range=(-2.61799 -1.45997)
          coordinate=knee_angle_r
      MovingPathPoint P3: tibia_r (0.0483851 0.0271086 0.00157322) x_coordinate=knee_angle_r y_coordinate=knee_angle_r
          z_coordinate=knee_angle_r
        x_location: MultiplierFunction: scale=1
          SimmSpline: x=(-2.0944 -1.99997 -1.5708 -1.45752 -1.39626 -1.0472 -0.698132 -0.526391 -0.349066 -0.174533 0 0.00017453 0.00034907 0.0279253 0.0872665 0.174533 2.0944)
              y=(0.0175082 0.0202202 0.0309116 0.0333257 0.0345676 0.0410942 0.0474297 0.0506691 0.0543783 0.0600407 0.0693987 0.0694092 0.0694196 0.0711413 0.075283 0.0823732 0.0644437)
        y_location: MultiplierFunction: scale=1
          SimmSpline: x=(-2.0944 -1.99997 -1.5708 -1.45752 -1.39626 -1.0472 -0.698132 -0.526391 -0.349066 -0.174533 0 0.00017453 0.00034907 0.0279253 0.0872665 0.174533 2.0944)
              y=(0.0263083 0.0267012 0.0282215 0.0284073 0.0284468 0.0280015 0.0272362 0.026795 0.0263174 0.025581 0.0235803 0.0235774 0.0235745 0.0230617 0.0215479 0.0179296 -0.0757138)
        z_location: MultiplierFunction: scale=1
          SimmSpline: x=(-2.0944 0.1745) y=(0.00157322 0.00157322)
    Thelen2003Muscle vas_int_r: max_isometric_force=4530 optimal_fiber_length=0.1261733 tendon_slack_length=0.136786
        pennation_angle_at_optimal=0.05235988
      PathPoint P1: femur_r (0.0340396 -0.225835 0.0363872)
      PathPoint P2: femur_r (0.0393216 -0.244616 0.0334527)
      ConditionalPathPoint P3: femur_r (0.0402607 -0.473033 0.00645579) range=(-2.61799 -1.42) coordinate=knee_angle_r
      MovingPathPoint P4: tibia_r (0.0402373 0.0297699 0.00202271) x_coordinate=knee_angle_r y_coordinate=knee_angle_r
          z_coordinate=knee_angle_r
        x_location: MultiplierFunction: scale=1
          SimmSpline: x=(-2.0944 -1.99997 -1.5708 -1.45752 -1.39626 -1.0472 -0.698132 -0.526391 -0.349066 -0.174533 0 0.00017453 0.00034907 0.0279253 0.0872665 0.174533 2.0944)
              y=(0.00929694 0.0120089 0.022704 0.0251187 0.0263607 0.0328932 0.0392704 0.0425567 0.0463615 0.0522856 0.0623256 0.0623371 0.0623486 0.0642454 0.0688531 0.0769044 0.0729095)
        y_location: MultiplierFunction: scale=1
          SimmSpline: x=(-2.0944 -1.99997 -1.5708 -1.45752 -1.39626 -1.0472 -0.698132 -0.526391 -0.349066 -0.174533 0 0.00017453 0.00034907 0.0279253 0.0872665 0.174533 2.0944)
              y=(0.0287664 0.0291593 0.0306917 0.0308797 0.0309195 0.0304938 0.0298616 0.0295622 0.0293503 0.0292314 0.0284217 0.0284203 0.0284189 0.0281523 0.0272157 0.0245296 -0.0770547)
        z_location: MultiplierFunction: scale=1
          SimmSpline: x=(-2.0944 2.0944) y=(0.00202271 0.00202271)
    Thelen2003Muscle med_gas_r: max_isometric_force=2241 optimal_fiber_length=0.1031128 tendon_slack_length=0.4124513
        pennation_angle_at_optimal=0.296706
      PathPoint P1: femur_r (-0.0223018 -0.461178 -0.0275838)
      ConditionalPathPoint P2: femur_r (-0.0352134 -0.472094 -0.0302835) range=(-0.785398 0.174533)
          coordinate=knee_angle_r
      PathPoint P3: calcn_r (0 0.0318348 -0.00544272)
    Thelen2003Muscle soleus_r: max_isometric_force=5137 optimal_fiber_length=0.092647 tendon_slack_length=0.2547793
        pennation_angle_at_optimal=0.4363323
      PathPoint P1: tibia_r (-0.00269695 -0.172268 0.00797847)
      PathPoint P2: calcn_r (0 0.0318348 -0.00544272)
    Thelen2003Muscle tib_ant_r: max_isometric_force=1759 optimal_fiber_length=0.1100528 tendon_slack_length=0.2504262
        pennation_angle_at_optimal=0.08726646
      PathPoint P1: tibia_r (0.0201147 -0.182493 0.0129229)
      PathPoint P2: tibia_r (0.0369707 -0.443985 -0.01989)
      PathPoint P3: calcn_r (0.11974 0.0182793 -0.0313213)
    BushingForce tibiaBushingForce1: body_1=tibia_r body_2=rKnee location_body_1=(-0.01 -0.45 0.05)
        orientation_body_1=(0 0 0) location_body_2=(0.04 0.045 -0.04) orientation_body_2=(0 0 0)
        rotational_stiffness=(1000 1000 1000) [Nm/rad] translational_stiffness=(10000 10000 10000) [N/m]
        rotational_damping=(0 0 0) [Nm/(rad/s)] translational_damping=(0.1 0.1 0.1) [N/(m/s)]
    BushingForce tibiaBushingForce2: body_1=tibia_r body_2=rKnee location_body_1=(-0.01 -0.11 0.05)
        orientation_body_1=(0 0 0) location_body_2=(0.041 0.389 -0.038) orientation_body_2=(0 0 0)
        rotational_stiffness=(1000 1000 1000) translational_stiffness=(10000 10000 10000) rotational_damping=(0 0 0)
        translational_damping=(0.1 0.1 0.1)
    BushingForce hipBushingForce1: body_1=femur_r body_2=rHip location_body_1=(0.005 -0.4 0.065)
        orientation_body_1=(0 0 0) location_body_2=(0.025 0.084 -0.04) orientation_body_2=(0 0 0)
        rotational_stiffness=(10000 10000 10000) translational_stiffness=(10000 10000 10000) rotational_damping=(0 0 0)
        translational_damping=(0.1 0.1 0.1)
    BushingForce hipBushingForce2: body_1=femur_r body_2=rHip location_body_1=(0.005 -0.05 0.065)
        orientation_body_1=(0 0 0) location_body_2=(0.064 0.431 -0.0345) orientation_body_2=(0 0 0)
        rotational_stiffness=(1000 1000 1000) translational_stiffness=(10000 10000 10000) rotational_damping=(0 0 0)
        translational_damping=(0.1 0.1 0.1)
  MarkerSet:
    Marker R.ASIS: pelvis (0.00201364 -0.00150927 0.129764)
    Marker L.ASIS: pelvis (0.00201364 -0.00150927 -0.132376)
    Marker V.Sacral: pelvis (-0.196272 -0.00150988 0.0102176)
    Marker R.Thigh.Upper: femur_r (0.00246194 -0.274998 0.0844135)
    Marker R.Thigh.Front: femur_r (0.0611316 -0.334334 -0.0116532)
    Marker R.Thigh.Rear: femur_r (0.00830804 -0.396231 0.0764562)
    Marker R.Shank.Upper: tibia_r (-0.0328388 -0.08877 0.0717862)
    Marker R.Shank.Front: tibia_r (0.0400457 -0.127228 0.0159831)
    Marker R.Shank.Rear: tibia_r (-0.0190735 -0.174657 0.0813596)
    Marker R.Heel: calcn_r (-0.0153835 0.057641 0.0028005)
    Marker R.Midfoot.Lat: calcn_r (0.127354 0.036139 0.0619193)
    Marker R.Toe.Tip: calcn_r (0.273085 0.0216892 -0.0191981)
    Marker femur_rbushingForce1: femur_r (0.005 -0.4 0.065)
    Marker rKneebushingForce2: rKnee (0.041 0.389 -0.038) fixed=true
    Marker rHipbushingForce1: rHip (0.025 0.084 -0.04)
    Marker femur_rbushingForce2: femur_r (0.005 -0.05 0.065)
    Marker rHipbushingForce2: rHip (0.064 0.431 -0.0345)
