# OpenSim document version 30000
Model Exoskeleton:
  credits: Marta G Carrilho
  length_units: meters
  force_units: N
  gravity: 0 -9.80665 0
  BodySet:
    Body ground: mass=0 mass_center=(0 0 0) inertia_xx=0 inertia_yy=0 inertia_zz=0 meshes=treadmill.vtp
    Body BackExo: mass=0.8530877 mass_center=(0.0567373 0.0433811 -0.00018222) inertia_xx=0.01254384
        inertia_yy=0.01446753 inertia_zz=0.00695939 inertia_xy=0.00217966 inertia_xz=0.00011335 inertia_yz=-4.28e-6
        meshes=BackExo.obj
      CustomJoint ground_Exo: parent_body=ground location_in_parent=(0 0 0) location=(0 0 0)
        Coordinate Exo_tilt: motion_type=rotational default_value=0 range=(-1.570796 1.570796) clamped=false
            locked=true
        Coordinate Exo_list: motion_type=rotational default_value=0 range=(-1.570796 1.570796) clamped=false
            locked=true
        Coordinate Exo_rotation: motion_type=rotational default_value=0 range=(-1.570796 1.570796) clamped=false
        Coordinate Exo_tx: motion_type=translational default_value=0 range=(-5 5) clamped=false
        Coordinate Exo_ty: motion_type=translational default_value=0 range=(-1 2) clamped=false
        Coordinate Exo_tz: motion_type=translational default_value=0 range=(-3 3) clamped=false
        SpatialTransform:
          TransformAxis rotation1: coordinates=Exo_tilt axis=(0 0 1) LinearFunction(coefficients=1 0)
          TransformAxis rotation2: coordinates=Exo_list axis=(1 0 0) LinearFunction(coefficients=1 0)
          TransformAxis rotation3: coordinates=Exo_rotation axis=(0 1 0) LinearFunction(coefficients=1 0)
          TransformAxis translation1: coordinates=Exo_tx axis=(1 0 0) LinearFunction(coefficients=1 0)
          TransformAxis translation2: coordinates=Exo_ty axis=(0 1 0) LinearFunction(coefficients=1 0)
          TransformAxis translation3: coordinates=Exo_tz axis=(0 0 1) LinearFunction(coefficients=1 0)
    Body Hip_R: mass=0.2138295 mass_center=(0.0805624 -0.191386 0.117911) inertia_xx=0.01556931 inertia_yy=0.004679
        inertia_zz=0.01394983 inertia_xy=-0.00314352 inertia_xz=0.00203429 inertia_yz=-0.00518597 meshes=RightHip.obj
      PinJoint hip_r: parent_body=BackExo location_in_parent=(0.081 -0.033 0) location=(0.081 -0.033 0)
        Coordinate hip_flexion_r: motion_type=rotational default_value=0 range=(-1.74533 0.349066) clamped=false
    Body Knee_R: mass=0.1956725 mass_center=(0.0282501 -0.523347 0.116142) inertia_xx=0.05890566 inertia_yy=0.00320362
        inertia_zz=0.0565293 inertia_xy=-0.00229535 inertia_xz=0.00058312 inertia_yz=-0.01209693 meshes=RightKnee.obj
      PinJoint knee_r: parent_body=Hip_R location_in_parent=(0.0512 -0.4117865 -0.131)
          location=(0.0512 -0.4117865 -0.131)
        Coordinate knee_flexion_r: motion_type=rotational default_value=0 range=(-1.74533 0.0872665) clamped=false
    Body Foot_R: mass=0.510668 mass_center=(0.0649924 -0.80779 0.0808896) inertia_xx=0.3374454 inertia_yy=0.00852229
        inertia_zz=0.3378579 inertia_xy=-0.02713561 inertia_xz=0.00250198 inertia_yz=-0.03328571 meshes=rfoot.obj
      PinJoint ankle_r: parent_body=Knee_R location_in_parent=(-0.00241833 -0.721093 -0.125)
          location=(-0.00241833 -0.721093 -0.125)
        Coordinate ankle_r: motion_type=rotational default_value=0 range=(-0.349066 0.261799) clamped=false
    Body Hip_L: mass=0.2138312 mass_center=(0.0617563 -0.190215 -0.117911) inertia_xx=0.01546839 inertia_yy=0.00411285
        inertia_zz=0.01328266 inertia_xy=-0.00273705 inertia_xz=-0.00159076 inertia_yz=0.00515508 meshes=LeftHip.obj
      PinJoint hip_L: parent_body=BackExo location_in_parent=(0.081 -0.033 0) location=(0.081 -0.033 0)
        Coordinate hip_flexion_L: motion_type=rotational default_value=0 range=(-1.74533 0.349066) clamped=false
    Body Knee_L: mass=0.1956729 mass_center=(0.0267696 -0.523223 -0.117142) inertia_xx=0.05893522 inertia_yy=0.00324431
        inertia_zz=0.0564987 inertia_xy=-0.00214054 inertia_xz=-0.00054288 inertia_yz=0.01221098 meshes=LeftKnee.obj
      PinJoint knee_l: parent_body=Hip_L location_in_parent=(0.0512 -0.4117865 -0.131)
          location=(0.0512 -0.4117865 -0.131)
        Coordinate knee_l: motion_type=rotational default_value=0 range=(-1.74533 0.0872665) clamped=false
    Body Foot_L: mass=0.510669 mass_center=(0.0670596 -0.806471 -0.0727226) inertia_xx=0.3357698 inertia_yy=0.00803848
        inertia_zz=0.3368414 inertia_xy=-0.02787635 inertia_xz=-0.00211809 inertia_yz=0.02985115 meshes=lfoot.obj
      PinJoint ankle_l: parent_body=Knee_L location_in_parent=(-0.00241833 -0.721093 -0.125)
          location=(-0.00241833 -0.721093 -0.125)
        Coordinate ankle_l: motion_type=rotational default_value=0 range=(-0.349066 0.261799) clamped=false
