# OpenSim document version 30000
Model exowithoutbody:
  length_units: meters
  force_units: N
  gravity: 0 -9.8065 0
  credits:
    Frank Anderson, Peter Loan, Ayman Habib, Ajay Seth, Michael Sherman
  BodySet:
    Body ground: mass=0 mass_center=(0 0 0) inertia_xx=1 inertia_yy=1 inertia_zz=1
    Body exoHip: mass=0.8530877 mass_center=(0.0787755 0.0603454 -0.000236886) inertia_xx=0.652412
        inertia_yy=0.01538234 inertia_zz=0.652412 inertia_xy=-0.05240901 inertia_xz=0.004515959 inertia_yz=-0.06019283
        meshes=BackExo.obj
      WeldJoint groundJoint: parent_body=ground location_in_parent=(0 0 0) location=(0 0 0)
    Body rThigh: mass=0.2138295 mass_center=(0.0794666 0.17348 -0.0117) inertia_xx=0.08788382 inertia_yy=0.005782386
        inertia_zz=0.08788382 inertia_xy=0.003881239 inertia_xz=0.001052505 inertia_yz=-0.01915214 meshes=RightHip.obj
      PinJoint exoHipJ: parent_body=exoHip location_in_parent=(0 0 0) location=(0.038 0.4645 0)
        Coordinate exoHipJoint_coord: motion_type=rotational range=(-0.3490659 1.745329)
    Body rShin: mass=0.1956725 mass_center=(-0.0112817 0.187756 0.012974) inertia_xx=0.1058946 inertia_yy=0.004949445
        inertia_zz=0.1058946 inertia_xy=0.003664639 inertia_xz=0.0009008935 inertia_yz=-0.02112655 meshes=RightKnee.obj
      PinJoint exoKneeJoint_r: parent_body=rThigh location_in_parent=(0 0 0) location=(0.0725 0.445 0)
        Coordinate kneeJoint_r_coord: motion_type=rotational range=(-0.08726646 1.745329)
    Body rFoot: mass=0.510668 mass_center=(0.0800928 -0.0746616 -0.0820677) inertia_xx=0.5509664 inertia_yy=0.01316655
        inertia_zz=0.5509664 inertia_xy=-0.04122131 inertia_xz=0.003865444 inertia_yz=-0.05531096 meshes=rfoot.obj
      PinJoint exoAnkleJoint_r: parent_body=rShin location_in_parent=(0 0 0) location=(0 0 0)
        Coordinate ankleJoint_r_coord: motion_type=rotational range=(-0.2617994 0.3490659)
  ForceSet:
    TorqueActuator exoHipActuator_r: bodyA=exoHip bodyB=rThigh torque_is_global=false optimal_force=20
    TorqueActuator exoKneeActuator_r: bodyA=rThigh bodyB=rShin torque_is_global=false optimal_force=20
    TorqueActuator exoAnkleActuator_r: bodyA=rFoot bodyB=rShin torque_is_global=false optimal_force=20
  ControllerSet Controllers:
    PositionController: actuator_list=(exoHipActuator_r exoKneeActuator_r exoAnkleActuator_r)
